# Бета - распределение
# 1. Функция плотности распределения
# x := 0, 0.01 .. 1
f(x, a, b) := Γ(a + b)*x^(a - 1)*(1 - x)^(b - 1)/(Γ(a)*Γ(b))
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# 2. Функция распределения
D(x, a, b) := integral(f(x, a, b), x = 0 .. x)
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3.*Начальные*моменты
a1(a, b) := integral(x*f(x, a, b), x = 0 .. 1)
a2(a, b) := integral(x^2*f(x, a, b), x = 0 .. 1)
a3(a, b) := integral(x^3*f(x, a, b), x = 0 .. 1)
# 4. Мат.ожидание
M1(a, b) := a1(a, b)
M2(a, b) := a/(a + b)
M1(1, 10) = 0.0909091
M2(1, 10) = 0.0909091
# temp := 0, 0.01 .. 1
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# 5. Мода
x := 0
root(d/dx(f(x, 2, 5)), x) = 0.2
root(d/dx(f(x, 2, 2)), x) = 0.5
t1 := 0.5
t2 := 0.2
й
d^2/dt1^2(f(t1, 2, 2)) = -12
d^2/dt2^2(f(t2, 2, 5)) = -76.8
x := 0, 0.01 .. 1
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# 6. Медиана
y1 := 0.1
r1 := root(D(y1, 2, 2) - 1/2, y1) = 0.5
r2 := root(D(y1, 2, 5) - 1/2, y1) = 0.26445
b1 := 0, 0.01 .. 1
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# 7. Дисперсия наработки
Di1(a, b) := a*b/((a + b)^2*(a + b + 1))
Di2(a, b) := a2(a, b) - a1(a, b)^2
α1 := 0.1, 0.2 .. 10
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# 8. Среднеквадратическое отклонение
σ(a, b) := sqrt(Di1(a, b))
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# 9. Коэффициент асимметрии
μ3(a, b) := a3(a, b) - 3*a1(a, b)*a2(a, b) + 2*a1(a, b)^3
As(a, b) := μ3(a, b)/σ(a, b)^3
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